OpenVSP model (file version 5), 12 components.
Geometry view with OpenVSP parameter names; values to 6 digits, angles in degrees, lengths in the model's unit.
Overall bounding box: X_Min=-0.0821807 X_Len=4.77858 Y_Min=-5.28311 Y_Len=10.5662 Z_Min=-0.506868 Z_Len=2.08203

Wing "Wing"
  location (X Y Z) 0 0 0, rotation 0 0 0
  symmetric about XZ
  bounding box size 2.4421 10.1841 0.656665
  totals: TotalSpan=10.1844 TotalProjectedSpan=10.1841 TotalChord=0.674621 TotalArea=10.5077 TotalAR=9.87051
  root: chord 2.4385, twist 0, NACA 4-series Camber=0.04 CamberLoc=0.4 ThickChord=0.266906
  sections:
    n   Span         Root_Chord  Tip_Chord  Area         Sweep    Sweep_Location  Dihedral     Twist  Twist_Location  tip airfoil
    1   0.159209     2.4385      2.17914    0.367585     3.22225  0               0.0797485    0      0.25            NACA 4-series Camber=0.04 CamberLoc=0.4 ThickChord=0.250205
    2   0.159209     2.17914     1.91978    0.326292     3.22225  0               0.0797485    0      0.25            NACA 4-series Camber=0.04 CamberLoc=0.4 ThickChord=0.233504
    3   0.318417     1.91978     1.66042    0.569999     3.22225  0               0.159497     0      0.25            NACA 4-series Camber=0.04 CamberLoc=0.4 ThickChord=0.216803
    4   0.636835     1.66042     1.40106    0.974828     3.22225  0               0.31898      0      0.25            NACA 4-series Camber=0.04 CamberLoc=0.4 ThickChord=0.200103
    5   0.636835     1.40106     1.1417     0.809658     3.22225  0               0.31898      0      0.25            NACA 4-series Camber=0.04 CamberLoc=0.4 ThickChord=0.183402
    6   0.636835     1.1417      0.882336   0.644488     3.22225  0               0.31898      0      0.25            NACA 4-series Camber=0.04 CamberLoc=0.4 ThickChord=0.166701
    7   1.27367      0.882336    0.597954   0.942701     3.22225  0               0.637961     0      0.25            NACA 4-series Camber=0.04 CamberLoc=0.4 ThickChord=0.15
    8   0.636835     0.597954    0.501102   0.349959     3.22225  0               0.31898      0      0.25            NACA 4-series Camber=0.04 CamberLoc=0.4 ThickChord=0.14
    9   0.318417     0.501102    0.452676   0.15185      3.22225  0               0.159497     0      0.25            NACA 4-series Camber=0.04 CamberLoc=0.4 ThickChord=0.13
    10  0.0796044    0.452676    0.44057    0.0355532    3.22225  0               0.0398674    0      0.25            as above
    11  0.0398022    0.44057     0.424928   0.0172244    3.22225  0               0.0199405    0      0.25            as above
    12  0.0398022    0.424928    0.400579   0.0164285    3.22225  0               0.0199405    0      0.25            as above
    13  0.0398022    0.400579    0.365746   0.0152507    3.22225  0               0.0199405    0      0.25            as above
    14  0.0398022    0.365746    0.320463   0.0136563    3.22225  0               0.0199405    0      0.25            as above
    15  0.0398022    0.320463    0.252539   0.0114034    3.22225  0               0.0199405    0      0.25            as above
    16  0.0199011    0.252539    0.191581   0.00441923   3.22225  0               0.00996345   0      0.25            as above
    17  0.00995055   0.191581    0.156748   0.00173303   3.22225  0               0.00498172   0      0.25            as above
    18  0.00497527   0.156748    0.104499   0.000649887  3.22225  0               0.00249769   0      0.25            as above
    19  0.00124382   0.104499    0.0783741  0.00011373   3.22225  0               0.000627834  0      0.25            as above
    20  0.000621909  0.0783741   0.0653117  4.46798e-05  3.22225  0               0.000313917  0      0.25            as above
    21  0.000310955  0.0653117   0.0587806  1.92935e-05  3.22225  0               0.000150134  0      0.25            as above
    22  0.000310955  0.0587806   0.0522494  1.72626e-05  3.22225  0               0.000150134  0      0.25            as above

Wing "Tail", child of "Wing"
  location (X Y Z) 3.57613 0 1.37157, rotation 180 10.3 0
  symmetric about XZ
  bounding box size 1.32751 3.83293 1.17007
  totals: TotalSpan=4.22917 TotalProjectedSpan=3.83293 TotalChord=1.05729 TotalArea=4.47148 TotalAR=3.28558
  root: chord 1.13862, twist 0, NACA 4-series Camber=0 CamberLoc=0.2 ThickChord=0.1
  sections:
    n  Span     Root_Chord  Tip_Chord  Area     Sweep  Sweep_Location  Dihedral  Twist  Twist_Location  tip airfoil
    1  2.11459  1.13862     0.975963   2.23574  -10    0               25        0      0.25            as above

Pod "PodGeom_R1", child of "Wing"
  location (X Y Z) -0.0565893 2.54734 0, rotation 0 0 0
  bounding box size 0.3 0.04 0.04
  Design: FineRatio=15 Length=0.3

Pod "PodGeom_L1", child of "PodGeom_R1"
  location (X Y Z) -0.0565893 -2.54734 0, rotation 0 0 0
  bounding box size 0.3 0.04 0.04
  Design: FineRatio=15 Length=0.3

Propeller "PropGeom_L1", child of "PodGeom_L1"
  location (X Y Z) -0.0565893 -2.54734 0, rotation 0 0 0
  bounding box size 0.0502889 1.01374 1.01374
  Design: Diameter=1.01191 NumBlade=4 Beta34=20 UseBeta34Flag=1 Feather=0 Rotate=0 Precone=0 ReverseFlag=0 FoldAngle=0 PropMode=0 AF=151.538 CLi=0.538798 Chord=0.177656 Solidity=0.226199 ConstructXoC=0.5 FeatherAxisXoC=0.5 FeatherOffsetXoC=0
  cross sections:
    n  RadiusFrac  shape
    0  0.2         ellipse Ellipse_Height=0.0202382 Ellipse_Width=0.0404765
    1  0.4         NACA 16-series Chord=0.0841152 IdealCl=0.7 ThickChord=0.144074
    2  1           NACA 16-series Chord=0.0657743 IdealCl=0.2 ThickChord=0.03
  Chord along r/R (cubic Bezier): 0.2: 0.08, 0.333333: 0.15, 0.466667: 0.2, 0.6: 0.2, 0.716667: 0.2, 0.833333: 0.2, 0.95: 0.2, 0.966667: 0.2, 0.983333: 0.2, 1: 0.13
  Twist along r/R (PCHIP): 0.2: 46.75, 0.75: 20, 1: 13
  Thick along r/R (cubic Bezier): 0.2: 0.5, 0.233333: 0.3, 0.266667: 0.225, 0.3: 0.2, 0.4: 0.125, 0.5: 0.115, 0.6: 0.1, 0.733333: 0.075, 0.866667: 0.055, 1: 0.03
  CLI along r/R (cubic Bezier): 0.2: 0, 0.266667: 0.7, 0.333333: 0.7, 0.4: 0.7, 0.466667: 0.7, 0.533333: 0.7, 0.6: 0.7, 0.733333: 0.7, 0.866667: 0.7, 1: 0.2

Propeller "PropGeom_R1", child of "PropGeom_L1"
  location (X Y Z) -0.0565893 2.54734 0, rotation 0 0 0
  bounding box size 0.0502889 1.01374 1.01374
  Design: Diameter=1.01191 NumBlade=4 Beta34=20 UseBeta34Flag=1 Feather=0 Rotate=0 Precone=0 ReverseFlag=0 FoldAngle=0 PropMode=0 AF=151.538 CLi=0.538798 Chord=0.177656 Solidity=0.226199 ConstructXoC=0.5 FeatherAxisXoC=0.5 FeatherOffsetXoC=0
  cross sections:
    n  RadiusFrac  shape
    0  0.2         ellipse Ellipse_Height=0.0202382 Ellipse_Width=0.0404765
    1  0.4         NACA 16-series Chord=0.0841152 IdealCl=0.7 ThickChord=0.144074
    2  1           NACA 16-series Chord=0.0657743 IdealCl=0.2 ThickChord=0.03
  blade curves as in "PropGeom_L1"

Pod "PodGeom_R2", child of "PropGeom_R1"
  location (X Y Z) 0.0688944 4.77624 0.01, rotation 0 0 0
  bounding box size 0.3 0.04 0.04
  Design: FineRatio=15 Length=0.3

Propeller "PropGeom_R2", child of "PropGeom_R1"
  location (X Y Z) 0.0688944 4.77624 0.01, rotation 0 0 0
  bounding box size 0.0502889 1.01374 1.01374
  Design: Diameter=1.01191 NumBlade=4 Beta34=20 UseBeta34Flag=1 Feather=0 Rotate=0 Precone=0 ReverseFlag=0 FoldAngle=0 PropMode=0 AF=151.538 CLi=0.538798 Chord=0.177656 Solidity=0.226199 ConstructXoC=0.5 FeatherAxisXoC=0.5 FeatherOffsetXoC=0
  cross sections:
    n  RadiusFrac  shape
    0  0.2         ellipse Ellipse_Height=0.0202382 Ellipse_Width=0.0404765
    1  0.4         NACA 16-series Chord=0.0841152 IdealCl=0.7 ThickChord=0.144074
    2  1           NACA 16-series Chord=0.0657743 IdealCl=0.2 ThickChord=0.03
  blade curves as in "PropGeom_L1"

Pod "PodGeom_L2", child of "PropGeom_L1"
  location (X Y Z) 0.0688944 -4.77624 0.01, rotation 0 0 0
  bounding box size 0.3 0.04 0.04
  Design: FineRatio=15 Length=0.3

Propeller "PropGeom_L2", child of "PodGeom_L2"
  location (X Y Z) 0.0688944 -4.77624 0.01, rotation 0 0 0
  bounding box size 0.0502889 1.01374 1.01374
  Design: Diameter=1.01191 NumBlade=4 Beta34=20 UseBeta34Flag=1 Feather=0 Rotate=0 Precone=0 ReverseFlag=0 FoldAngle=0 PropMode=0 AF=151.538 CLi=0.538798 Chord=0.177656 Solidity=0.226199 ConstructXoC=0.5 FeatherAxisXoC=0.5 FeatherOffsetXoC=0
  cross sections:
    n  RadiusFrac  shape
    0  0.2         ellipse Ellipse_Height=0.0202382 Ellipse_Width=0.0404765
    1  0.4         NACA 16-series Chord=0.0841152 IdealCl=0.7 ThickChord=0.144074
    2  1           NACA 16-series Chord=0.0657743 IdealCl=0.2 ThickChord=0.03
  blade curves as in "PropGeom_L1"

Fuselage "Left Port Boom"
  location (X Y Z) 0.963831 -1.40972 0.02, rotation 0 -15.4 0
  bounding box size 2.65172 0.248179 0.902513
  Design: Length=2.74978
  cross sections:
    n  XLocPercent  YLocPercent  ZLocPercent  shape
    0  0            0            0            point
    1  0.25         0            0            ellipse Ellipse_Height=0.05 Ellipse_Width=0.05
    2  0.5          0            0            as above
    3  0.75         0            0            as above
    4  1            0            0            circle Circle_Diameter=0.005

Fuselage "Right Port Boom", child of "Left Port Boom"
  location (X Y Z) 0.963831 1.40972 0.02, rotation 0 -15.4 0
  bounding box size 2.65172 0.248179 0.902513
  Design: Length=2.74978
  cross sections:
    n  XLocPercent  YLocPercent  ZLocPercent  shape
    0  0            0            0            point
    1  0.25         0            0            ellipse Ellipse_Height=0.05 Ellipse_Width=0.05
    2  0.5          0            0            as above
    3  0.75         0            0            as above
    4  1            0            0            circle Circle_Diameter=0.005

VSPAERO settings: Sref=2.2 bref=4.7 cref=0.5 Xcg=0.467557 Ycg=1.58147e-05 Zcg=0.00246529 AlphaStart=0 AlphaEnd=0 AlphaNpts=10 BetaStart=0 BetaEnd=0 BetaNpts=1 MachStart=0 MachEnd=0 MachNpts=1 ReCref=1e+07 Vinf=20 Rho=0.1363
